// SBML level 3 version 2
// Exported by VCell 7.3

model compound_release_gastric_gastric_digestion()
  // model units - substance: Unit_umol, time: Unit_s, volume: Unit_l, area: Unit_dm2, length: Unit_dm, extent: Unit_umol

  // Compartments:
  compartment EC = 2e-11 Unit_l;
  compartment Cell = 2.5e-14 Unit_l;
  compartment PM = 4.196e-9;  // 2-D

  // Species:
  species Pr_comp in Cell = 8500;
  species Lp_comp in Cell = 6960;
  species Comp_in in Cell = 0;
  species Comp_out in EC = 0;

  // Parameters:
  Kf_pr_g = 0.0005 Unit_s_1;
  Kf_lp_g = 0.0005 Unit_s_1;
  Kr_g = 0.1 Unit_s_1;
  Voltage_PM = 0;
  _F_ = 9.64853321e4 Unit_C_mol_1;
  Kf_pr_dissoc has Unit_s_1;
  Kr_pr_dissoc has Unit_s_1;
  Kf_Lp_dissoc has Unit_s_1;
  Kr_Lp_dissoc has Unit_s_1;
  P_flux = 0.01 Unit_dm_s_1;

  // Assignment rules:
  Kf_pr_dissoc := Kf_pr_g;
  Kr_pr_dissoc := Kr_g;
  Kf_Lp_dissoc := Kf_lp_g;
  Kr_Lp_dissoc := Kr_g;

  // Reactions:
  pr_dissoc: Pr_comp -> Comp_in; (Kf_pr_dissoc*Pr_comp + (-(Kr_pr_dissoc*Comp_in)))*Cell;
  Lp_dissoc: Lp_comp -> Comp_in; (Kf_Lp_dissoc*Lp_comp + (-(Kr_Lp_dissoc*Comp_in)))*Cell;
  flux: Comp_in -> Comp_out; P_flux*(Comp_in + (-Comp_out))*PM;
    I = 0 Unit_pA_dm_2; carrierValence = 1 Unit__1;

  // Unit definitions:
  unit Unit_umol = 1e-6 mole;
  unit Unit_l = litre;
  unit Unit_dm2 = (0.1 metre)^2;
  unit Unit_dm = 0.1 metre;
  unit Unit_s = second;
  unit Unit_s_1 = 1 / second;
  unit Unit_K = kelvin;
  unit Unit__1 = dimensionless;
  unit Unit_C_mol_1 = coulomb / mole;
  unit Unit_C_nmol_1 = coulomb / (1e-9 mole);
  unit Unit_molecules_pmol_1 = item / (1e-12 mole);
  unit Unit__1000000000 = 1e9 dimensionless;
  unit Unit_mV_C_K_1_mol_1 = 1e-3 volt * coulomb / (kelvin * mole);
  unit Unit_mV_V_1 = dimensionless;
  unit Unit_uM_um3_molecules_1 = 1e-6 mole * (1e-6 metre)^3 / (litre * item);
  unit Unit_pA_dm_2 = 1e-12 ampere / (0.1 metre)^2;
  unit Unit_dm_s_1 = 0.1 metre / second;
end
